log             log.MFI_223_radius_5_ratio_75 append
units           real
atom_style      full
boundary        p p p

pair_style      lj/cut 12.500
bond_style      harmonic
angle_style     hybrid fourier cosine/periodic
dihedral_style  harmonic

dielectric      1.0
pair_modify     tail yes mix arithmetic
special_bonds   lj/coul 0.0 0.0 1.0
box tilt        large
read_data       data.MFI_223_radius_5_ratio_75

#### Atom Groupings ####
group           fram     id   1:3384
#### END Atom Groupings ####
